!---------------------------------------------------------------------------
fini
/CLEAR,START
/prep7
!------------------------------------------------------------------------------
a=6
b=5
t=0.01
kg=0
n=200    !n的值可调，n越大，计算时间越长。
!----------------------------------------------
et,1,63
mp,ex,1,2.11e11
mp,dens,1,7850+kg/t
mp,nuxy,1,0.3
r,1,t
k,1,
k,2,a
k,3,a,b
k,4,0,b
a,1,2,3,4
aatt,1,1,1
lesize,all,a/n
amesh,all
nsel,s,loc,x,0
nsel,a,loc,x,a
nsel,a,loc,y,0
nsel,a,loc,y,b
d,all,ux,0
d,all,uy,0
d,all,uz,0
allsel,all
fini
/solu
antype,modal
modopt,lanb,1000
solve
